units         real
atom_style    full
bond_style    harmonic
special_bonds fene
angle_style   harmonic
pair_style    table linear 1000
#pair_style    hybrid/overlay table linear 1000 hbond/dreiding/lj 2 10.0 10.0 90.0
#pair_style    hybrid/overlay table linear 1000 hbond/dreiding/morse 2 10.0 10.0 90.0
#pair_style    hybrid/overlay table linear 1000 morse 3.1
#pair_style    hybrid/overlay morse 3.1 hbond/dreiding/lj 2 10.0 10.0 90.0
#pair_style    hybrid/overlay morse 3.1 hbond/dreiding/morse 2 10.0 10.0 90.0
